# Задание 1
n := 5
x := 2
y := (sqrt(x^3 + n) + cos(|n*x - 1|)^2)/(nthroot((x^5 + sin(x) + n), 4)*cos(π*(x + n)/4))
y = 2.52809
# Задание 2
x1 := 7
y1 := 10
z := -3
p := if(x1 > y1, sin(x1) + 3*|y1| - z^2, (y1 + 3)*ln(|x1 + 1|)/sqrt(z^2 + 1))
p = 8.5485
q := if(x1 > y1 and x1 < 1, cos(x1) + 2*|y1 + 1| - z, (x1*y1 + 3)/sqrt(y1^2 + 5))
q = 7.12407
w := if(x1 < y1 or y1 ≥ 10, x1^2 + 2*(y1*x1 + 1) - z, (x1^-3*y1^2 + 3)*sqrt(z^2 + 7))
w = 194
# Задание 3
x2 := -2, -1.6 .. 2
f(x2) := (x2^2 - n*x2 + sin(x2))*sqrt(|x2 - cos(n*x2)|)
x2 = [-2; -1.6; -1.2; -0.8; -0.4; 0; 0.4; 0.8; 1.2; 1.6; 2]
f(x2) = [14.1048; 11.5301; 9.56509; 1.50067; 0.224988; 0; -1.31047; -3.18616; -1.7767; -5.86657; -8.5776]
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# Задание 4
A := runif(3, -3, 3)
B := runif(3, -3, 3)
C := runif(3, -3, 3)
transpose(A) = [-2.43357, 2.58894, 2.36761]
transpose(B) = [-1.63609, -0.53573, 0.768421]
transpose(C) = [-0.29032, 0.586969, 2.12875]
B1 := -B
B1 = [1.63609; 0.53573; -0.768421]
s := A*B
V := B1×C
w := (A×B)*C
s = 4.4139
w = 9.67031
V = [1.59148; -3.25974; 1.11587]
dA := sqrt(A[0]^2 + A[1]^2 + A[2]^2)
dB := sqrt(B[0]^2 + B[1]^2 + B[2]^2)
dC := sqrt(C[0]^2 + C[1]^2 + C[2]^2)
Array := [dA; dB; dC]
Array = [4.26971; 1.88528; 2.2272]
Max := max(Array)
Max = 4.26971  # Это С
i := 0, 1 .. 9
j := 0, 1 .. 9
M[i, j] := -10 + floor(rnd(20))
sum(sum(M[i, j], j = 0 .. 9), i = 0 .. 9) = -97
SumPos(A) :=
    s ← 0
    for i ∈ 0 .. 9
        for j ∈ 0 .. 9
            s ← s + A[i, j] if A[i, j] > 0
    return s
SumNeg(A) :=
    s ← 0
    for i ∈ 0 .. 9
        for j ∈ 0 .. 9
            s ← s + A[i, j] if A[i, j] < 0
    return s
M = [
    2, 1, -7, 1, -6, 2, 1, -1, 4, 2;
    6, 1, 8, 4, 3, -4, -4, -8, 7, -7;
    -9, 2, 0, -2, -1, -7, 4, 6, 7, -4;
    -8, 5, 2, -9, 3, -8, -6, 8, 3, -1;
    -1, 0, 3, 2, -10, -8, 7, 4, -3, 1;
    9, -7, -8, 9, -10, -9, -8, 7, 4, -10;
    4, -6, -7, -4, -3, 6, 0, 5, -8, -2;
    -8, -9, 1, 0, -4, 6, -5, 7, 4, -3;
    -6, -6, 0, -9, 0, -9, 7, -8, 8, -10;
    -4, -3, 8, 0, 3, -5, 0, -3, 1, 3
]
SumPos(M) = 191
SumNeg(M) = -288
X := M[:, 0]
Y := transpose(M)[:, 9]
Y := transpose(Y)
# Задание 5
Y = [-4, -3, 8, 0, 3, -5, 0, -3, 1, 3]
X = [2; 6; -9; -8; -1; 9; 4; -8; -6; -4]
f1(x3) := e^(-(|x3|/3))*cos(x3)
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X*Y = [
    -8, -6, 16, 0, 6, -10, 0, -6, 2, 6;
    -24, -18, 48, 0, 18, -30, 0, -18, 6, 18;
    36, 27, -72, 0, -27, 45, 0, 27, -9, -27;
    32, 24, -64, 0, -24, 40, 0, 24, -8, -24;
    4, 3, -8, 0, -3, 5, 0, 3, -1, -3;
    -36, -27, 72, 0, 27, -45, 0, -27, 9, 27;
    -16, -12, 32, 0, 12, -20, 0, -12, 4, 12;
    32, 24, -64, 0, -24, 40, 0, 24, -8, -24;
    24, 18, -48, 0, -18, 30, 0, 18, -6, -18;
    16, 12, -32, 0, -12, 20, 0, 12, -4, -12
]
# Задание 6
x4 := -9, -8.75 .. 9
x4 = [
    -9; -8.75; -8.5; -8.25; -8; -7.75; -7.5; -7.25; -7; -6.75
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]
f4(x4) := if(x4 < 0, e^x4*x4^3, e^(-x4)*x4^3)
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# Задание 7
x71 := -2*π
s2 := 1, 2 .. 16
Δx := π/4
x7[s2] := x71 + Δx*s2
g7(x7) := sqrt(|x7|)*sin(x7)
g7(x7) = [0; 2.69879; 3.81667; 2.69879; 0; -2.69879; -3.81667; -2.69879; 0; 2.69879; 3.81667; 2.69879; 0; -2.69879; -3.81667; -2.69879; 0]
x7 = [0; -5.49779; -4.71239; -3.92699; -3.14159; -2.35619; -1.5708; -0.785398; 0; 0.785398; 1.5708; 2.35619; 3.14159; 3.92699; 4.71239; 5.49779; 6.28319]
O := x7
Y11 := g7(x7)
filename1 := "Matr_X.txt"
filename2 := "Matr_Y.txt"
WRITEPRN(filename1) := O
WRITEPRN(filename2) := Y11
XX := READPRN(filename1)
YY := READPRN(filename2)
YY = [0; 2.699; 3.817; 2.699; 0; -2.699; -3.817; -2.699; 0; 2.699; 3.817; 2.699; 0; -2.699; -3.817; -2.699; 0]
XX = [0; -5.498; -4.712; -3.927; -3.142; -2.356; -1.571; -0.7854; 0; 0.7854; 1.571; 2.356; 3.142; 3.927; 4.712; 5.498; 6.283]
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# Задание 8
x9 := -3 .. 3
q1(x9) := e^(-x9^2)
q2(x9) := d/dx9(q1(x9))
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# Задание 9
x911 := -15
x912 := 15
Δx91 := 1
i91 := 0 .. 42
y911 := -15
y912 := 15
Δy91 := 1
j91 := 0 .. 42
h(x91, y91) := sin(sqrt(x91^2 + y91^2))/sqrt(x91^2 + y91^2)
x91[i91] := -15 + (30/43)*i91
y91[j91] := -15 + (30/43)*j91
Z[i91, j91] := h(x91[i91], y91[j91])
# [component: inputs Z]
# Задача 10
x100 := -5 .. 5
f10(x100) := x100^2 + (x100 - 2)*sin(x100) - 5
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root(f10(x100), x100) = [-1.32936; -1.32936; -1.32936; -1.32936; -1.32936; -1.32936; 2.19967; 2.19967; 2.19967; 2.19967; 2.19967]
# Задание 11
x11 := -4 .. 4
f11(x11) := x11^2 + x11*sin(2*x11) - (x11 - 5)*cos(x11)
root(f11(x11), x11) = [-2.97354; -2.97354; -1.93283; -2.97354; -1.93283; -1.93283; -2.97354; -1.93283; -1.93283]
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root(f11(x11), x11, -4, -2) = -2.97354
root(f11(x11), x11, -2, 4) = -1.93283
# Задание 12
pol(x12) := x12^3 + (4 - n)*x12^2 + (3 - 4*n)*x12 - 3*n
V := pol(x12) coeffs → [-15; -17; -1; 1]
V = [-15; -17; -1; 1]
R := polyroots(V)
R = [-3; -1; 5]
x := -4, -4 + 0.01 .. 6
i := 0, 1 .. 2
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# Задание 13
x13 := 0
y13 := 0
z13 := 0
Given
n*x13 + (n + 1)*y13 + (n + 2)*z13 == 6*n + 8
(n - 3)*x13 + (n - 2)*y13 + n*z13 == 6*n - 7
(n - 1)*x13 + n*y13 + (n + 1)*z13 == 6*n + 2
Find(x13, y13, z13) = [1; 2; 3]
A13 := [n, n + 1, n + 2; n - 3, n - 2, n; n - 1, n, n + 1] = [5, 6, 7; 2, 3, 5; 4, 5, 6]
B13 := [6*n + 8; 6*n - 7; 6*n + 2] = [38; 23; 32]
A13*X13 == B13
X13 := A13^-1*B13 = [1; 2; 3]
x13 := X13[0]
y13 := X13[1]
z13 := X13[2]
A13*X13 = [38; 23; 32]
x13 = 1
y13 = 2
z13 = 3
# Задание 14
x14^2/81 + y14^2/16 - 1 == (x14 - 9)^2 + (y14 - 2)^2 - 25 solve, x14, y14 → [9/2, 0; 549/40, 0]
# Задание 15
x15 := 0, 0.1 .. 10
f15(x15) := x15*sin(x15)
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x15 := 8
minx := Minimize(f15, x15) = 11.0855
minx = 11.0855
maxx := Maximize(f15, x15) = 7.97867
